***------------------------------------------------------------------***
***------------------------------------------------------------------***
***---------------------DEFINITION DES MODELES-----------------------***
***------------------------------------------------------------------***
***------------------------------------------------------------------***
***------------------------
***  Beton Portique
***------------------------
MoMulti 	= MODE VMulti MECANIQUE ELASTIQUE ISOTROPE				;

***------------------------------------------------------------------***
***------------------------------------------------------------------***
***-------------------DEFINITION DES MATERIAUX-----------------------***
***------------------------------------------------------------------***
***------------------------------------------------------------------***
*** Portique
***------------------
MaMulti 	= MATE MoMulti 'YOUN' 31.E9 'NU' 0.2 RHO 2400       	;
***------------------------------------------------------------------***
***------------------------------------------------------------------***
***------------DEFINITION DES CONDITIONS AUX LIMITES-----------------***
***------------------------------------------------------------------***
***------------------------------------------------------------------***

* CL 		= BLOQ UX UY UZ SLong
PXZ1	 	= (Vmulti COOR 2) POIN MINI								;
RIG1		= BLOQ UY PXZ1											;

***------------------
***Conditions totales
***------------------
CLTot 		= RIG1													;

***----------------
*** Rigidite totale
***----------------
RigStr 		= RIGI MoMulti MaMulti 									;
RigTot 		= RigStr 'ET' CLTot 									;


SI CMODE															;
***------------------------------------------------------------------***
***------------------------------------------------------------------***
***---------------------Modes de vibration --------------------------***
***------------------------------------------------------------------***
***------------------------------------------------------------------***
* Matrice de masse
	MassTot		= MASS MoMulti MaMulti									;
* Fréqunces d'intervalle de recherche
	FreqInf 	= 1. 													;
	FreqSup 	= 500. 													;
* Extraire les valeurs et vecteurs propres
	TB			= VIBR 'INTERVALLE' FreqInf FreqSup RigTot MassTot
					 'IMPR' VRAI 										;
***------------------------------------------------------------------***
***------------------------------------------------------------------***
***-------------------------Post traitement--------------------------***
***------------------------------------------------------------------***
***------------------------------------------------------------------***
* Nao funcionam 6 aqui. maximo 3
	NMOD		= 3 													;
	I			= 0 													;
	REPETER BLOC1 NMOD 													;
		I			= I+1 												;
		FRQ			= TB.MODES.I.FREQUENCE 								;
		NUM			= TB.MODES.I.NUMERO_MODE 							;
		TITRE 'DEFORME MODALE' NUM 'FREQUENCE' FRQ 						;
		CHP1		= TB.MODES.I.DEFORMEE_MODALE 						;
		DEF0 		= DEFO VMulti CHP1 0. BLAN 							;
		DEF1		= DEFO VMulti CHP1 ROUG 							;
		TRAC CACH (DEF0 ET DEF1)				 						;
	FIN BLOC1 															;

FINSI																	;
